# Лабораторная работа 6 "Численное интегрирование".
# Гордеев Никита, группа 22307, вариант 7, обобщенная формула средних прямоугольников
# ДАНО:
f(x) := cot(x) - x^2
a := 0.5
b := 1.4
# ШАГ 1: ВЫЧИСЛЕНИЕ ЗНАЧЕНИЯ ИНТЕГРАЛА I С ПОМОЩЬЮ ВСТРОЕННОЙ ФУНКЦИИ MATHCAD
I := integral(f(x), x = a .. b) = -0.15249
# ШАГ 2: ВЫЧИСЛЕНИЕ ЗНАЧЕНИЙ ИНТЕГРАЛА ПО ОБОБЩЕННОЙ ФОРМУЛЕ СРЕДНИХ ПРЯМОУГОЛЬНИКОВ
k := 1 .. 10
# диапазона для переменной
n[k] := 2^k  # значений n в зависимости от k
h[k] := (b - a)/n[k]  # шаг интегрирования h в зависимости от k
a[k] := a + h[k]/2
# левой границы
# интервала от k
# значения интеграла J_k
# суммирование значений функции f на различных точках внутри каждого подинтервала, умноженных на соответствующий вес из вектора весов
J[k] := sum(h[k]*f(a[k] + i*h[k]), i = 0 .. n[k] - 1) = [-0.161854; -0.155433; -0.153275; -0.15269; -0.152541; -0.152503; -0.152494; -0.152491; -0.152491; -0.152491]
# ШАГ 3: ВЫЧИСЛЕНИЕ АБСОЛЮТНЫХ ВЕЛИЧИН РАЗНОСТЕЙ ЗНАЧЕНИЙ ИНТЕГРАЛА
# разности между точным значением интеграла I и приближенным значением J_k
Z[k] := |I - J[k]| = [0.00936341; 0.0029423; 0.000784245; 0.000199379; 5.00572e-5; 1.25277e-5; 3.13275e-6; 7.83241e-7; 1.95814e-7; 4.89536e-8]
# ШАГ 4: ОЦЕНКА ПОГРЕШНОСТИ МЕТОДОМ РУНГЕ
# относительная величина изменения между приближенными значениями
k := 2 .. 10
R[k] := |J[k] - J[k - 1]|/3
# абсолютная величина разности
R[k] = [0.00214037; 0.00071935; 0.000194955; 4.9774e-5; 1.25099e-5; 3.13164e-6; 7.83171e-7; 1.95809e-7; 4.89533e-8]
R[k - 1]/R[k] = [0; 2.97542; 3.68982; 3.91682; 3.97878; 3.99467; 3.99866; 3.99967; 3.99992]
# Скорость
# сходимости
# ШАГ 5: ВЫЧИСЛЕНИЕ ПРИБЛИЖЕННОГО ЗНАЧЕНИЯ J ПО КВАДРАТУРНОЙ ФОРМУЛЕ ГАУССА
m := 1  # кол-во узлов
j := 0 .. m - 1
a := 0.5
b := 1.4
x := [0.5]  # узлы
c := [1]  # коэффициенты
z[j] := a + (b - a)*x[j] = [0.95]  # узел интегрирования в формуле Гаусса
G1 := (b - a)*sum(c[j]*f(z[j]), j = 0 .. m - 1) = -0.168649  # численное приближение интеграла методом Гаусса
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m := 2  # кол-во узлов
j := 0 .. m - 1
a := 0.5
b := 1.4
x := [0.21132487; 0.78867513]  # узлы
c := [0.5; 0.5]  # коэффициенты
z[j] := a + (b - a)*x[j] = [0.690192; 1.20981]  # узел интегрирования в формуле Гаусса
G2 := (b - a)*sum(c[j]*f(z[j]), j = 0 .. m - 1) = -0.158092  # численное приближение интеграла методом Гаусса
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m := 3  # кол-во узлов
j := 0 .. m - 1
a := 0.5
b := 1.4
x := [0.11270167; 0.5; 0.88729833]  # узлы
c := [5/18; 5/9; 5/18]  # коэффициенты
z[j] := a + (b - a)*x[j] = [0.601432; 0.95; 1.29857]  # узел интегрирования в формуле Гаусса
G3 := (b - a)*sum(c[j]*f(z[j]), j = 0 .. m - 1) = -0.171601  # численное приближение интеграла методом Гаусса
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m := 4  # кол-во узлов
j := 0 .. m - 1
a := 0.5
b := 1.4
x := [0.06943184; 0.33000948; 0.66999052; 0.93056815]  # узлы
c := [0.17392742; 0.32607258; 0.32607258; 0.17392742]  # коэффициенты
z[j] := a + (b - a)*x[j] = [0.562489; 0.797009; 1.10299; 1.33751]  # узел интегрирования в формуле Гаусса
G4 := (b - a)*sum(c[j]*f(z[j]), j = 0 .. m - 1) = -0.152515  # численное приближение интеграла методом Гаусса
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m := 5  # кол-во узлов
j := 0 .. m - 1
a := 0.5
b := 1.4
x := [0.04691008; 0.23076534; 0.5; 0.76923466; 0.95308992]  # узлы
c := [0.11846344; 0.23931433; 0.28444444; 0.23931433; 0.11846344]  # коэффициенты
# узел интегрирования в формуле Гаусса
z[j] := a + (b - a)*x[j] = [0.542219; 0.707689; 0.95; 1.19231; 1.35778]
G5 := (b - a)*sum(c[j]*f(z[j]), j = 0 .. m - 1) = -0.152492  # численное приближение интеграла методом Гаусса
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m := 6  # кол-во узлов
j := 0 .. m - 1
a := 0.5
b := 1.4
x := [0.03376524; 0.16939531; 0.38069041; 0.61930959; 0.83060469; 0.96623475]  # узлы
c := [0.08566225; 0.18038079; 0.23395697; 0.23395697; 0.18038079; 0.08566225]  # коэффициенты
# узел интегрирования в формуле Гаусса
z[j] := a + (b - a)*x[j] = [0.530389; 0.652456; 0.842621; 1.05738; 1.24754; 1.36961]
G6 := (b - a)*sum(c[j]*f(z[j]), j = 0 .. m - 1) = -0.152491  # численное приближение интеграла методом Гаусса
# ШАГ 6: ВЫЧИСЛЕНИЕ АБСОЛЮТНОЙ ВЕЛИЧИНЫ РАЗНОСТИ ЗНАЧЕНИЙ ИНТЕГРАЛА
I = -0.15249
G1 = -0.168649
|I - G1| = 0.0161588
G2 = -0.158092
|I - G2| = 0.00560129
G3 = -0.171601
|I - G3| = 0.0191102
G4 = -0.152515
|I - G4| = 2.40379e-5
Z[k] = [0.0029423; 0.000784245; 0.000199379; 5.00572e-5; 1.25277e-5; 3.13275e-6; 7.83241e-7; 1.95814e-7; 4.89536e-8]
G5 = -0.152492
|I - G5| = 1.54062e-6
G6 = -0.152491
|I - G6| = 9.88908e-8
